// SBML level 2 version 3

model yeast()

  // Compartments:
  compartment cell = 1;

  // Species:
  species S1 in cell = 100/cell; S1 is "T()";
  species S2 in cell = 100/cell; S2 is "T2()";
  species S3 in cell = 2/cell; S3 is "D()";
  species S4 in cell = 2/cell; S4 is "Da()";
  species S5 in cell = 0; S5 is "m()";
  species S6 in cell = 0; S6 is "P()";

  // Parameters:
  kdim = 1;
  kdis = 1;
  kon = 0.0024;
  koff = 0.24;
  pb = 0.25;
  pd = 0.01;
  kb = 0.66666667;
  kd = 0.05;

  // Assignment rules:
  T := 0 + S1;
  T2 := 0 + S2;
  D := 0 + S3;
  Da := 0 + S4;
  m := 0 + S5;
  P := 0 + S6;

  // Reactions:
  R1: S1 + S1 => S2; 0.5*kdim*S1*S1;
  R2: S2 => S1 + S1; kdis*S2;
  R3: S2 + S3 => S4; kon*S2*S3;
  R4: S4 => S2 + S3; koff*S4;
  R5: S4 => S4 + S5; kb*S4;
  R6: S5 => S5 + S6; pb*S5;
  R7: S5 => ; kd*S5;
  R8: S6 => ; pd*S6;

  // Unit definitions:
  unit substance = item;
end
