// SBML level 2 version 3

model 4proV2()

  // Compartments:
  compartment cell = 1;

  // Species:
  species S1 in cell = 192.7959/cell; S1 is "pCD3z()";
  species pSLP76 in cell = 1463.265/cell; pSLP76 is "pSLP76()";
  species S3 in cell = 5.251/cell; S3 is "pErk()";
  species S4 in cell = 435.2968/cell; S4 is "pS6()";

  // Parameters:
  k1 = 0.1;
  k2 = 0.1;
  k3 = 0.95;
  k4 = 0.17;
  k5 = 0.05;

  // Assignment rules:
  pCD3z := 0 + S1;
  pSLP7 := 0 + pSLP76;
  pErk := 0 + S3;
  pS6 := 0 + S4;

  // Reactions:
  R1: => S1; k1;
  R2: S1 => S1 + pSLP76; k2*S1;
  R3: pSLP76 => pSLP76 + S3; k3*pSLP76;
  R4: S3 => S3 + S4; k4*S3;
  R5: S1 => ; k5*S1;
  R6: pSLP76 => ; k5*pSLP76;
  R7: S3 => ; k5*S3;
  R8: S4 => ; k5*S4;

  // Unit definitions:
  unit substance = item;
end
