// SBML level 2 version 3

model 6_pro_lin()

  // Compartments:
  compartment cell = 1;

  // Species:
  species S1 in cell = 192.7959/cell; S1 is "X1()";
  species S2 in cell = 1463.265/cell; S2 is "X2()";
  species S3 in cell = 5.251/cell; S3 is "X3()";
  species S4 in cell = 435.2968/cell; S4 is "X4()";
  species S5 in cell = 5.809538/cell; S5 is "X5()";
  species S6 in cell = 6.254916/cell; S6 is "X6()";

  // Parameters:
  k1 = 0.1;
  k2 = 0.1;
  k3 = 0.95;
  k4 = 0.17;
  k5 = 0.05;
  k6 = 0.18;

  // Assignment rules:
  X1 := 0 + S1;
  X2 := 0 + S2;
  X3 := 0 + S3;
  X4 := 0 + S4;
  X5 := 0 + S5;
  X6 := 0 + S6;

  // Reactions:
  R1: S1 => S2; k1*S1;
  R2: S2 => S3; k2*S2;
  R3: S3 => S4; k3*S3;
  R4: S4 => S6; k4*S4;
  R5: S5 => S4; k5*S5;
  R6: S6 => S2; k6*S6;

  // Unit definitions:
  unit substance = item;
end
