// SBML level 2 version 3

model model()

  // Compartments:
  compartment cell = 1;

  // Species:
  species S1 in cell = 192.7959/cell; S1 is "Syk()";
  species S2 in cell = 1463.265/cell; S2 is "Vav()";
  species S3 in cell = 5.251/cell; S3 is "SykVav()";
  species S4 in cell = 435.2968/cell; S4 is "pVav()";
  species S5 in cell = 5.809538/cell; S5 is "SHP1()";
  species S6 in cell = 6.254916/cell; S6 is "SHP1PVav()";

  // Parameters:
  k1 = 0.1;
  k2 = 0.2;
  k3 = 0.95;
  k4 = 0.17;
  k5 = 0.05;
  k6 = 0.18;

  // Assignment rules:
  Syk := 0 + S1;
  Vav := 0 + S2;
  SykVav := 0 + S3;
  pVav := 0 + S4;
  SHP1 := 0 + S5;
  SHP1PVav := 0 + S6;

  // Reactions:
  R1: S1 + S2 => S3; k1*S1*S2;
  R2: S3 => S1 + S2; k2*S3;
  R3: S3 => S1 + S4; k3*S3;
  R4: S4 + S5 => S6; k4*S4*S5;
  R5: S6 => S4 + S5; k5*S6;
  R6: S6 => S2 + S5; k6*S6;

  // Unit definitions:
  unit substance = item;
end
