// SBML level 2 version 3

model yeast()

  // Compartments:
  compartment cell = 1;

  // Species:
  species S1 in cell = 100/cell; S1 is "T()";
  species S2 in cell = 2/cell; S2 is "D()";
  species S3 in cell = 2/cell; S3 is "Da()";
  species S4 in cell = 0; S4 is "m()";
  species S5 in cell = 0; S5 is "P()";

  // Parameters:
  kon = 0.0024;
  koff = 0.24;
  pb = 0.25;
  pd = 0.01;
  kb = 0.66666667;
  kd = 0.05;

  // Assignment rules:
  T := 0 + S1;
  D := 0 + S2;
  Da := 0 + S3;
  m := 0 + S4;
  P := 0 + S5;

  // Reactions:
  R1: S1 + S2 => S3; kon*S1*S2;
  R2: S3 => S1 + S2; koff*S3;
  R3: S3 => S3 + S4; kb*S3;
  R4: S4 => S4 + S5; pb*S4;
  R5: S4 => ; kd*S4;
  R6: S5 => ; pd*S5;

  // Unit definitions:
  unit substance = item;
end
